# Este método de diseño esta alineado a M_Sistema_PV_10KW_V2 (Matlab) y M_ELECTRO2025_V1 (Matlab)
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# Paso 1: Modelo y Lazo Abierto en Continuo (controlando a x1 = ipv = iL)
# Circuito equivalente en el tiempo de encendido:
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# Malla de entrada:
-vpv + vL == 0
-vpv + L*d/dt(ipv) == 0
d/dt(ipv) == vpv/L
# Malla de salida:
iCdc + idc == 0
Cdc*d/dt(vdc) + vdc/Rdc == 0
d/dt(vdc) == -vdc/(Cdc*Rdc)
# Circuito equivalente en tiempo de apagado:
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# Malla de entrada:
-vpv + vL + vdc == 0
-vpv + L*d/dt(ipv) + vdc == 0
d/dt(ipv) == vpv/L - vdc/L
# Ecuación del nodo de salida:
d/dt(vdc) == ipv/Cdc - vdc/(Cdc*Rdc)
ipv == iCdc + idc
ipv == Cdc*d/dt(vdc) + vdc/Rdc
# Ecuaciones del tiempo de encendido: | Ecuaciones del tiempo de apagado:
d/dt(ipv) == vpv/L - vdc/L
d/dt(ipv) == vpv/L
d/dt(vdc) == ipv/Cdc - vdc/(Cdc*Rdc)
d/dt(vdc) == -vdc/(Cdc*Rdc)
# Aplicando el modelo del interruptor (Switched Model) usando el ciclo de trabajo d
d/dt(ipv) == vpv/L - vdc*(1 - d)/L
# El término (1-d) permite que el término vdc/L no aparesca en el tiempo de encendido. El termino vpv/L esta presente en encendido y apagado
d/dt(vdc) == ipv*(1 - d)/Cdc - vdc/(Cdc*Rdc)
# El término (1-d) permite que el término iL/Cdc no aparesca en el tiempo de encendido. El término vdc/(CdcRdc) esta presente en encendido y apagado
# En este caso se usa control digital, por lo tanto habra una ganancia del PWM digital (Kdpwm) que se introduce en d como:
d == Kdpwm*uc
# donde:
Kdpwm == 1/ucmax
ucmax == 2^b - 1  # b = es el numero del PWM digital
# ucmax = es el valor máximo de la señal control
# Considerando esta ganancia, la representación del sistema en variables de estado es:
x1 == ipv
u1 == Kdpwm*uc
d/dt(x1) == -(1 - Kdpwm*uc)/L*x2 + u2/L
x2 == vdc
u2 == vpv
d/dt(x2) == (1 - Kdpwm*uc)/Cdc*x1 - 1/(Cdc*Rdc)*x2
y == x1
# Determinar el modelo linealizado para poder aplicarle control P, PI, PID, realimentación de estados, etc.;
d/dt*x == Amc*x + Bmc*u
x == [x1; x2]
u == [uc; u2]
y == [x1, x2]
y == Cmc*x + Dmc*u  # Nota: cualquier fuente en el circuito se considera como entrada
# Determinar los estados Jacobianos:
f1 == d/dt(x1) == -(1 - Kdpwm*uc)/L*x2 + u2/L
f2 == d/dt(x2) == (1 - Kdpwm*uc)/Cdc*x1 - 1/(Cdc*Rdc)*x2
# Por lo tanto las matrices son (jacobiano de las ecuaciones diferenciales con respecto a los estados):
Amc == [∂f1/∂x1, ∂f1/∂x2; ∂f2/∂x1, ∂f2/∂x2] == [0, -(1 - Kdpwm*UC)/L; (1 - Kdpwm*UC)/Cdc, -1/(Cdc*Rdc)]
Bmc == [∂f1/∂uc, ∂f1/∂u2; ∂f2/∂uc, ∂f2/∂u2] == [Kdpwm*X2/L, 1/L; -Kdpwm*X1/Cdc, 0]
y == [x1, x2]
Cmc == [∂y/∂x1, ∂y/∂x1; ∂y/∂x2, ∂y/∂x2] == [1, 0; 0, 1]
Dmc == [∂uc/∂x1, ∂u2/∂x1; ∂uc/∂x2, ∂u2/∂x2] == [0, 0; 0, 0]
# donde los términos X1, X2, UC y U2 estan definidos en  un punto de operación
# Con estas matrices el sistema linealizado es:
# x1 | x2 | uc | u2
[d/dt*x1; d/dt*x2] == [0, -(1 - Kdpwm*UC)/L; (1 - Kdpwm*UC)/Cdc, -1/(Cdc*Rdc)]*[x1; x2] + [Kdpwm*X2/L, 1/L; -Kdpwm*X1/Cdc, 0]*[uc; u2]
# x1 | x2 | u1 | u2
[y1; y2] == [x1, x2]
Cmc == [1, 0; 0, 1]
Dmc == [0, 0; 0, 0]
# Las funciones de transferencia en continuo, considerando a u2 como perturbacion, quedan
Gs == Cmc*(s*I - Amc)^-1*Bmc + Dmc
Gs == [1/2, 0; 0, 1]*(([s, 0; 0, s] - [0, -(1 - Kdpwm*UC)/L; (1 - Kdpwm*UC)/Cdc, -1/(Cdc*Rdc)])^-1)*[Kdpwm*X2/L; -Kdpwm*X1/Cdc] + [0; 0]
[1/2, 0; 0, 1]*(([s, 0; 0, s] - [0, -(1 - Kdpwm*UC)/L; (1 - Kdpwm*UC)/Cdc, -1/(Cdc*Rdc)])^-1)*[Kdpwm*X2/L; -Kdpwm*X1/Cdc] + [0; 0] simplify; collect, s → [
    (Kdpwm*X2 + Kdpwm*Rdc*X1 - Kdpwm^2*Rdc*UC*X1 + Cdc*Kdpwm*Rdc*X2*s)/(2*Rdc*Kdpwm^2*UC^2 - 4*Rdc*Kdpwm*UC + 2*Cdc*L*Rdc*s^2 + 2*L*s + 2*Rdc);
    -(Kdpwm^2*Rdc*UC*X2 - Kdpwm*Rdc*X2 + Kdpwm*L*Rdc*X1*s)/(Rdc*Kdpwm^2*UC^2 - 2*Rdc*Kdpwm*UC + Cdc*L*Rdc*s^2 + L*s + Rdc)
]
Gs_uc_to_x1 == ((Kdpwm*X2/(2*L))*s + Kdpwm*(X2 + Rdc*X1 - Kdpwm*Rdc*UC*X1)/(2*Cdc*L*Rdc))/(s^2 + (1/(Cdc*Rdc))*s + (Rdc*Kdpwm^2*UC^2 - 2*Rdc*Kdpwm*UC + Rdc)/(Cdc*L*Rdc))
Gs_uc_to_x2 == -((Kdpwm*X1/Cdc)*s - Kdpwm*(X2 - Kdpwm*UC*X2)/(Cdc*L))/(s^2 + (1/(Cdc*Rdc))*s + (Rdc*Kdpwm^2*UC^2 - 2*Rdc*Kdpwm*UC + Rdc)/(Cdc*L*Rdc))
# Paso 2: Modelo y Lazo Abierto en Discreto
# de
# x1 | x2 | uc
[d/dt*x1; d/dt*x2] == [0, -(1 - Kdpwm*UC)/L; (1 - Kdpwm*UC)/Cdc, -1/(Cdc*Rdc)]*[x1; x2] + [Kdpwm*X2/L; -Kdpwm*X1/Cdc]*uc
# x1 | x2 | uc
[y1; y2] == [x1, x2]
Cmc == [1, 0; 0, 1]
Dmc == [0; 0]
# Las matrices son
Amc == [0, -(1 - Kdpwm*UC)/L; (1 - Kdpwm*UC)/Cdc, -1/(Cdc*Rdc)]
Bmc == [Kdpwm*X2/L; -Kdpwm*X1/Cdc]
Cmc == [1, 0; 0, 1]
Dmc == [0; 0]
# Considerando el metodo de Euler hacia delante y Ts el tiempo de muestreo, la discretización del sistema es:
Amd == I + Ts*Amc == [1, Ts*(Kdpwm*UC - 1)/L; -Ts*(Kdpwm*UC - 1)/Cdc, 1 - Ts/(Cdc*Rdc)]
Bmd == Ts*Bmc == [Kdpwm*Ts*X2/L; -Kdpwm*Ts*X1/Cdc]
Cmd == Cmc == [1, 0; 0, 1]
Dmd == Dmc == [0; 0]
# Las funciones de transferencia en discreto quedan
Gz == Cmd*(z*I - Amd)^-1*Bmd + Dmd
Gz == [1/2, 0; 0, 1]*(([z, 0; 0, z] - [1, Ts*(Kdpwm*UC - 1)/L; -Ts*(Kdpwm*UC - 1)/Cdc, 1 - Ts/(Cdc*Rdc)])^-1)*[Kdpwm*Ts*X2/L; -Kdpwm*Ts*X1/Cdc] + [0; 0]
[1/2, 0; 0, 1]*(([z, 0; 0, z] - [1, Ts*(Kdpwm*UC - 1)/L; -Ts*(Kdpwm*UC - 1)/Cdc, 1 - Ts/(Cdc*Rdc)])^-1)*[Kdpwm*Ts*X2/L; -Kdpwm*Ts*X1/Cdc] + [0; 0] simplify; collect, z → [
    (Kdpwm*Ts^2*X2 + Kdpwm*Rdc*Ts^2*X1 - Cdc*Kdpwm*Rdc*Ts*X2 - Kdpwm^2*Rdc*Ts^2*UC*X1 + Cdc*Kdpwm*Rdc*Ts*X2*z)/(2*Rdc*Ts^2 + z*(2*L*Ts - 4*Cdc*L*Rdc) - 2*L*Ts + 2*Cdc*L*Rdc + 2*Kdpwm^2*Rdc*Ts^2*UC^2 - 4*Kdpwm*Rdc*Ts^2*UC + 2*Cdc*L*Rdc*z^2);
    (Kdpwm*Rdc*Ts^2*X2 - Kdpwm^2*Rdc*Ts^2*UC*X2 + Kdpwm*L*Rdc*Ts*X1 - Kdpwm*L*Rdc*Ts*X1*z)/(Rdc*Ts^2 + z*(L*Ts - 2*Cdc*L*Rdc) - L*Ts + Cdc*L*Rdc + Kdpwm^2*Rdc*Ts^2*UC^2 - 2*Kdpwm*Rdc*Ts^2*UC + Cdc*L*Rdc*z^2)
]
Gz_u1_to_x1 == ((Kdpwm*Ts*X2/(2*L))*z + Kdpwm*Ts*(Ts*X2 - Cdc*Rdc*X2 + Rdc*Ts*X1 - Kdpwm*Rdc*Ts*UC*X1)/(2*Cdc*L*Rdc))/(z^2 + (Ts/(Cdc*Rdc) - 2)*z + (Rdc*Kdpwm^2*Ts^2*UC^2 - 2*Rdc*Kdpwm*Ts^2*UC + Rdc*Ts^2 - L*Ts)/(Cdc*L*Rdc) + 1)
Gz_u1_to_x2 == ((-Kdpwm*Ts*X1/Cdc)*z + Kdpwm*Ts*(L*X1 + Ts*X2 - Kdpwm*Ts*UC*X2)/(Cdc*L))/(z^2 + (Ts/(Cdc*Rdc) - 2)*z + (Rdc*Kdpwm^2*Ts^2*UC^2 - 2*Rdc*Kdpwm*Ts^2*UC + Rdc*Ts^2 - L*Ts)/(Cdc*L*Rdc) + 1)
# Paso 3: Diseño del controlador por retroalimentación de estados (SF) con accion integral en tiempo continuo
# a) Definir el modelo matematico en variables de estado (controlando a x1)
# El sistema se describe mediante las variables de estado:
x1 == ipv  # (corriente del inductor)
x2 == vdc  # (voltaje de salida, que es el voltaje del bus)
# La ecuación de entrada es el ciclo de trabajo uc = d/Kdpwm, y la ecuacion de salida es x2 = vdc. Por lo tanto las ecuaciones de estado son:
# Modelo lineallizado
# x1 | x2 | uc
[d/dt*x1; d/dt*x2] == [0, -(1 - Kdpwm*UC)/L; (1 - Kdpwm*UC)/Cdc, -1/(Cdc*Rdc)]*[x1; x2] + [Kdpwm*X2/L; -Kdpwm*X1/Cdc]*uc
# x1 | x2 | uc
[y1; y2] == [x1, x2]
Cmc == [1, 0; 0, 1]
Dmc == [0; 0]
# El sistema representado con matrices
Amc == [0, -(1 - Kdpwm*UC)/L; (1 - Kdpwm*UC)/Cdc, -1/(Cdc*Rdc)]
Bmc == [Kdpwm*X2/L; -Kdpwm*X1/Cdc]
Cmc == [1, 0]  # Control de x1
Dmc == [0]
# Se introduce una acción integral, reprsentada por un tercer estado x3, para garantizar error cero en estado estacionario:
x3 == integral(X1ref - x1, t)
# Derivando:
d/dt(x3) == X2ref - x2
# Este nuevo estado se introduce en Am, de tal forma que el sistema aumento queda
Aamc == [Amc, 0; -Cmc, 0] == [0, -(1 - Kdpwm*UC)/L, 0; (1 - Kdpwm*UC)/Cdc, -1/(Cdc*Rdc), 0; -1, 0, 0]
Bamc == [Bmc; 0] == [Kdpwm*X2/L; -Kdpwm*X1/Cdc; 0]  # Control de x1
Camc == [1, 0, 0]
Dmc == [0]
# b) Obtener el polinomio característico del sistema sin control. El polinomio característico del sistema si control se obtiene de:
# det(sI-Aam)
|[s, 0, 0; 0, s, 0; 0, 0, s] - [0, -(1 - Kdpwm*UC)/L, 0; (1 - Kdpwm*UC)/Cdc, -1/(Cdc*Rdc), 0; -1, 0, 0]| simplify; collect, s → s^3 + (1/(Cdc*Rdc))*s^2 + ((Rdc*Kdpwm^2*UC^2 - 2*Rdc*Kdpwm*UC + Rdc)/(Cdc*L*Rdc))*s
s^3 + (1/(Cdc*Rdc))*s^2 + ((Rdc*Kdpwm^2*UC^2 - 2*Rdc*Kdpwm*UC + Rdc)/(Cdc*L*Rdc))*s == 0
s^3 + (1/(Cdc*Rdc))*s^2 + ((Rdc*Kdpwm^2*UC^2 - 2*Rdc*Kdpwm*UC + Rdc)/(Cdc*L*Rdc))*s == 0
s^3 + a2c*s^2 + a1c*s + a0c == 0
a2c == 1/(Cdc*Rdc)
a1c == (Kdpwm*UC - 1)^2/(Cdc*L)
a0c == 0
# c) Defiinir el polinomio característico deseado. Los polos deseados se eligen con los requerimientos de diseño:
# Tiempo de establecimiento | Testc
# Factor de amortiguamiento | ζc
# Dado el tiempo de establecimiento y el facto de amotiguamiento, los polos dominantes deseados se derivan de:
s^2 + 2*ζc*ωnc*s + ωnc^2 == 0  # donde
ωnc == 4/(ζc*Testc)
# Dado que el sistema aumentado es de tres estados, entonces agregamos un tercer polo (p3) ubicado lejos de los polos dominantes deseados para que cumplir con los requirimientos de diseño
(s + p3c)*(s^2 + 2*ζc*ωnc*s + ωnc^2) == 0
# Expandiendo, el polinomio deseado es:
s^3 + (p3c + 2*ζc*ωnc)*s^2 + (ωnc^2 + 2*ζc*p3c*ωnc)*s + p3c*ωnc^2 == 0
# d) Resolver para Km_barra. Se debe cumplir que:
s^3 + a2c*s^2 + a1c*s + a0c == 0
s^3 + (a2c - K1_barra_c)*s^2 + (a1c - K2_barra_c)*s + (a0c - K3_barra_c) == s^3 + (p3c + 2*ζc*ωnc)*s^2 + (ωnc^2 + 2*ζc*p3c*ωnc)*s + p3c*ωnc^2
# Comparando los coefiencientes se resuelve Km_barra_c y considerando que en la ecuación de retroalimentación esta considerado el signo (-k*x):
K1_barra_c == (p3c + 2*ζc*ωnc) - a2c == (p3c + 2*ζc*ωnc) - 1/(Cdc*Rdc) simplify → K1_barra_c == p3c - a2c + 2*ζc*ωnc and p3c - a2c + 2*ζc*ωnc == p3c - 1/(Cdc*Rdc) + 2*ζc*ωnc
K1_barra_c == p3c - 1/(Cdc*Rdc) + 2*ζc*ωnc
K2_barra_c == (ωnc^2 + 2*ζc*p3c*ωnc) - a1c == (ωnc^2 + 2*ζc*p3c*ωnc) - (Kdpwm*UC - 1)^2/(Cdc*L)
K2_barra_c == (ωnc^2 + 2*ζc*p3c*ωnc) - (Kdpwm*UC - 1)^2/(Cdc*L)
K3_barra_c == (p3c*ωnc^2) - a0c == (p3c*ωnc^2)
K3_barra_c == (p3c*ωnc^2)
# c) Transformación de simulitud para obtener las ganancias correctas. El valor de Km_barra_c obtenido no es el definitivo. Se debe aplicar una transformacion de similitud utilizando la matriz de controlabilidad.
# Calcula la matriz de controlabilidad
Coc == [Bamc, Aamc*Bamc, Aamc^2*Bamc, Aamc^3*Bamc, ...., Aamc^(n - 1)*Bamc]  # donde n es el número de estados de la matris Aamc
Coc == [Bamc, Aamc*Bamc, Aamc^2*Bamc]
# el rango de Coc debe ser completo para que el sistema sea completamente controlable
# Obtener la matriz de transfomarcion Qc. Se construye la matriz de Toeplitz con los coeficientes del polinomio caractetístico sin control
Cic == toeplitz(a2c, a1c, a0c)
# La matriz de transformación es:
Qc == (Coc*Cic)^-1
# Ganancias finales son:
Kmc == Km_barra_c*Qc
# Paso 4: Diseño del controlador por retroalimentación de estados (SF) con acción integral en discreto
# a) Definir el modelo matemático en variables de estado (controlando a x1)
# El sistema se describe mediante las variables de estado:
x1 == ipv  # (corriente del sistema PV, que es igual a iL)
x2 == vdc  # (voltaje de salida, que es el voltaje del bus dc)
# La ecuación de entrada es el ciclo de trabajo uc = d/Kdpwm, y la ecuacion de salida es x2 = vdc. Por lo tanto las ecuaciones de estado son:
# Modelo lineallizado
# x1 | x2 | uc
[d/dt*x1; d/dt*x2] == [0, -(1 - Kdpwm*UC)/L; (1 - Kdpwm*UC)/Cdc, -1/(Cdc*Rdc)]*[x1; x2] + [Kdpwm*X2/L; -Kdpwm*X1/Cdc]*uc
# x1 | x2 | uc
[y1; y2] == [x1, x2]
Cmc == [1, 0; 0, 1]
Dmc == [0; 0]
# El sistema representado con matrices
Amc == [0, -(1 - Kdpwm*UC)/L; (1 - Kdpwm*UC)/Cdc, -1/(Cdc*Rdc)]
Bmc == [Kdpwm*X2/L; -Kdpwm*X1/Cdc]
Cmc == [1, 0]  # Control de x1
Dmc == [0]
# Considerando el metodo de Euler hacia delante y Ts el tiempo de muestreo, la discretización del sistema es:
Amd == I + Ts*Amc == [1, -Ts*(1 - Kdpwm*UC)/L; Ts*(1 - Kdpwm*UC)/Cdc, 1 - Ts/(Cdc*Rdc)]
Bmd == Ts*Bmc == [Kdpwm*Ts*X2/L; -Kdpwm*Ts*X1/Cdc]
Cmd == Cmc == [1, 0; 0, 1]
Dmd == Dmc == [0; 0]
# Se introduce una acción integral, reprsentada por un tercer estado x3, para garantizar error cero en estado estacionario:
x3(k + 1) == x3(k) + Ts*(X1ref(k) - x1(k))
# Equivalente a:
x1(k)
x2(k)
x3(k + 1) == x3(k) - Ts*Ci*x(k) + Ts*r(k)
# con
Ci == [1, 0]
# Este nuevo estado se introduce en Amd, de tal forma que el sistema aumento queda
Xamd == [x(k); x3(k)]
x1(k)
x2(k)
x3(k)
Aamd == [Amd, 0; -Ts*Ci, 1] == [1, -Ts*(1 - Kdpwm*UC)/L, 0; Ts*(1 - Kdpwm*UC)/Cdc, 1 - Ts/(Cdc*Rdc), 0; -Ts, 0, 1]
# Control de x1
Bamd == [Bmd; 0] == [Kdpwm*Ts*X2/L; -Kdpwm*Ts*X1/Cdc; 0]
Camd == [1, 0, 0]
Damd == [0]
# b) Obtener el polinomio característico del sistema sin control. El polinomio característico del sistema si control se obtiene de:
# det(zI-Aamd)
|[z, 0, 0; 0, z, 0; 0, 0, z] - [1, -Ts*(1 - Kdpwm*UC)/L, 0; Ts*(1 - Kdpwm*UC)/Cdc, 1 - Ts/(Cdc*Rdc), 0; -Ts, 0, 1]| simplify; collect, z → z^3 + ((L*Ts - 3*Cdc*L*Rdc)/(Cdc*L*Rdc))*z^2 + ((Rdc*Kdpwm^2*Ts^2*UC^2 - 2*Rdc*Kdpwm*Ts^2*UC + Rdc*Ts^2 - 2*L*Ts + 3*Cdc*L*Rdc)/(Cdc*L*Rdc))*z - (Rdc*Kdpwm^2*Ts^2*UC^2 - 2*Rdc*Kdpwm*Ts^2*UC + Rdc*Ts^2 - L*Ts + Cdc*L*Rdc)/(Cdc*L*Rdc)
z^3 - ((3*Cdc*L*Rdc - L*Ts)/(Cdc*L*Rdc))*z^2 + ((Rdc*Kdpwm^2*Ts^2*UC^2 - 2*Rdc*Kdpwm*Ts^2*UC + Rdc*Ts^2 - 2*L*Ts + 3*Cdc*L*Rdc)/(Cdc*L*Rdc))*z - (Rdc*Kdpwm^2*Ts^2*UC^2 - 2*Rdc*Kdpwm*Ts^2*UC + Rdc*Ts^2 - L*Ts + Cdc*L*Rdc)/(Cdc*L*Rdc) == 0
z^3 - a2d*z^2 + a1d*z - a0d == 0
a2d == (3*Cdc*L*Rdc - L*Ts)/(Cdc*L*Rdc)
a1d == (Rdc*Kdpwm^2*Ts^2*UC^2 - 2*Rdc*Kdpwm*Ts^2*UC + Rdc*Ts^2 - 2*L*Ts + 3*Cdc*L*Rdc)/(Cdc*L*Rdc)
a0d == (Rdc*Kdpwm^2*Ts^2*UC^2 - 2*Rdc*Kdpwm*Ts^2*UC + Rdc*Ts^2 - L*Ts + Cdc*L*Rdc)/(Cdc*L*Rdc)
# c) Defiinir el polinomio caracteristico deseado. Los polos deseados se eligen con los requerimientos de diseño:
# Tiempo de establecimiento | Testd
# Factor de amortiguamiento | ζd
# Periodo de muestreo | Ts
# Establecer los polos adicionales rapidos para que no tengan influencia en los dominantes desados (para cumplir con los requirimientos de diseño), los cuales son n-2, donde n corresponde al tamaño de Aamd (sistema aumentado). Por lo tanto:
3 - 2 == 1  # el polo adicional es
p3d == s3
# Dado el tiempo de establecimiento y el facto de amotiguamiento, los polos dominantes deseados se derivan de:
s^2 + 2*ζd*ωnd*s + ωnd^2 == 0  # donde
ωnd == 4/(ζc*Testd)
s1 == -ζd*ωnd + j*ωnd*sqrt(1 - ζd^2)
s2 == -ζd*ωnd - j*ωnd*sqrt(1 - ζd^2)
zi == e^(si*Ts)  # para convertir los polos de s a z
z1 == e^(s1*Ts)
z2 == e^(s2*Ts)
z3 == e^(s3*Ts)
# Se forma el polinomio característico deseado de lazo cerrado
(z - z1)*(z - z2)*(z - z3) == z^3 - (z1 + z2 + z3)*z^2 + (z3*(z1 + z2) + z1*z2)*z - z1*z2*z3
# d) Resolver para Km_barra. Se debe cumplir que:
z^3 - (a2d - K1_barra_d)*z^2 + (a1d - K2_barra_d)*z - (a0d - K3_barra_c) == z^3 - (z1 + z2 + z3)*z^2 + (z3*(z1 + z2) + z1*z2)*z - z1*z2*z3
# Comparando los coefiencientes se resuelve Km_barra_d y considerando que en la ecuación de retroalimentación esta considerado el signo (-k*x):
z^3 - (z1 + z2 + z3)*z^2 + (z3*(z1 + z2) + z1*z2)*z - z1*z2*z3
menos
z^3 - a2d*z^2 + a1d*z - a0d == 0
K1_barra_d == -(z1 + z2 + z3) - (-((3*Cdc*L*Rdc - L*Ts)/(Cdc*L*Rdc))) simplify → K1_barra_d == 3 - z2 - z3 - Ts/(Cdc*Rdc) - z1
K1_barra_d == 3 - z2 - z3 - Ts/(Cdc*Rdc) - z1
K2_barra_d == (z3*(z1 + z2) + z1*z2) - ((Rdc*Kdpwm^2*Ts^2*UC^2 - 2*Rdc*Kdpwm*Ts^2*UC + Rdc*Ts^2 - 2*L*Ts + 3*Cdc*L*Rdc)/(Cdc*L*Rdc)) simplify → K2_barra_d == z1*z2 + z1*z3 + z2*z3 - Ts^2/(Cdc*L) + 2*Ts/(Cdc*Rdc) - Kdpwm^2*Ts^2*UC^2/(Cdc*L) + 2*Kdpwm*Ts^2*UC/(Cdc*L) - 3
K2_barra_d == z1*z2 + z1*z3 + z2*z3 - Ts^2/(Cdc*L) + 2*Ts/(Cdc*Rdc) - Kdpwm^2*Ts^2*UC^2/(Cdc*L) + 2*Kdpwm*Ts^2*UC/(Cdc*L) - 3
K3_barra_d == -(z1*z2*z3) - (-((Rdc*Kdpwm^2*Ts^2*UC^2 - 2*Rdc*Kdpwm*Ts^2*UC + Rdc*Ts^2 - L*Ts + Cdc*L*Rdc)/(Cdc*L*Rdc))) simplify → K3_barra_d == (Rdc*Kdpwm^2*Ts^2*UC^2 - 2*Rdc*Kdpwm*Ts^2*UC + Rdc*Ts^2 - L*Ts + Cdc*L*Rdc - Cdc*L*Rdc*z1*z2*z3)/(Cdc*L*Rdc)
K3_barra_d == (Rdc*Kdpwm^2*Ts^2*UC^2 - 2*Rdc*Kdpwm*Ts^2*UC + Rdc*Ts^2 - L*Ts + Cdc*L*Rdc - Cdc*L*Rdc*z1*z2*z3)/(Cdc*L*Rdc)
# c) Transformacion de simulitud para obtener las ganancias correctas. El valor de Km_barra_d obtenido no es el definitivo. Se debe aplicar una transformacion de similitud utilizando la matriz de controlabilidad.
# Calcula la matriz de controlabilidad
Cod == [Bamd, Aamd*Bamd, Aamd^2*Bamd, Aamd^3*Bamd, ...., Aamd^(n - 1)*Bamc]  # donde n es el número de estados de la matris Aamd
Cod == [Bamd, Aamd*Bamd, Aamd^2*Bamd]
# el rango de Cod debe ser completo para que el sistema sea completamente controlable
# Obtener la matriz de transfomarcion Qd. Se construye la matriz de Toeplitz con los coeficientes del polinomio característico sin control
Cid == toeplitz(a2d, a1d, a0d)
# La matriz de transformación es:
Qc == (Cod*Cid)^-1
# Ganancias finales son:
Kmd == Km_barra_d*Qd  # por haber incluido Ts en la matris Aamd, en la ganancia Kimd = Kmd_3 multiplicarla por Ts, pero solo en script, en simulink se deja asi
# Diseño de los controlador en continuo y digital
# Punto de operación
Kdpwm := 1.5259*10^-5
UC := 2.354*10^4
Rdc := 99.3049
Cdc := 4.7*10^-4
X1 := 15.7147
X2 := 1000
L := 0.1
Ts := 2*10^-4
# Requeriemientos de diseño
Testc := 0.06
p3c := 400
ζc := 1
ωnc := 4/(ζc*Testc) = 66.6667
# Caso controlador continuo por SF+ Acción Ingetral
K1_barra_c := (p3c - 1/(Cdc*Rdc) + 2*ζc*ωnc) = 511.908
K2_barra_c := ((ωnc^2 + 2*ζc*p3c*ωnc) - (Kdpwm*UC - 1)^2/(Cdc*L)) = 49041
K3_barra_c := (p3c*ωnc^2) = 1777778
Km_barra_c := [K1_barra_c, K2_barra_c, K3_barra_c]
Coc == [Bamc, Aamc*Bamc, Aamc^2*Bamc]
Bamc := [Kdpwm*X2/L; -Kdpwm*X1/Cdc; 0] = [0.15259; -0.510193; 0]
Aamc := [0, -(1 - Kdpwm*UC)/L, 0; (1 - Kdpwm*UC)/Cdc, -1/(Cdc*Rdc), 0; -1, 0, 0] = [0, -6.40803, 0; 1363.41, -21.4255, 0; -1, 0, 0]
Aamc*Bamc = [3.26933; 218.974; -0.15259]
Aamc^2*Bamc = [-1403.19; -234.191; -3.26933]
Coc := [
    Bamc[0, 0], (Aamc*Bamc)[0, 0], (Aamc^2*Bamc)[0, 0];
    Bamc[1, 0], (Aamc*Bamc)[1, 0], (Aamc^2*Bamc)[1, 0];
    Bamc[2, 0], (Aamc*Bamc)[2, 0], (Aamc^2*Bamc)[2, 0]
] = [0.15259, 3.26933, -1403.19; -0.510193, 218.974, -234.191; 0, -0.15259, -3.26933]
Cic == toeplitz(a2c, a1c, a0c)
a2c := 1/(Cdc*Rdc) = 21.4255
a1c := (Kdpwm*UC - 1)^2/(Cdc*L) = 8736.78
a0c == 0
Cic := [1, a2c, a1c; 0, 1, a2c; 0, 0, 1] = [1, 21.4255, 8736.78; 0, 1, 21.4255; 0, 0, 1]
Qc := (Coc*Cic)^-1
Qc = [5.93032, -0.186386, 0; 0.0145432, 0.00434962, 0; -0.000339389, -0.000101505, -0.152937]
Kmc := Km_barra_c*Qc
Kmc = [3145.63, -62.5568, -271887]
k1mc := Kmc[0, 0] = 3145.63
k2mc := Kmc[0, 1] = -62.5568
kimc := -Kmc[0, 2] = 271887  # Se invierte el signo para evitar la acción contraria de la integración
# Nota: el poder de calculo de matchad tiene que estar a su maxima capacidad, de lo contrario el ultimo valor de Km no es correcto
# Estos resultados se resuelven en el arhivo "M_Dis_Cont_Conv_Boost_V1" usando el comando acker
# Caso controlador continuo por SF+ Accion Ingetral
# Punto de operación
Kdpwm := 1.5259*10^-5
UC := 2.354*10^4
Rdc := 99.3049
Cdc := 4.7*10^-4
X1 := 15.7147
X2 := 1000
L := 0.1
Ts := 2*10^-4
# Requeriemientos de diseño
Testd := 0.06
p3d := -400
ζd := 1
ωnd := 4/(ζd*Testd) = 66.6667
ωnd*sqrt(1 - ζd^2) = 0
s1 == -ζd*ωnd + j*ωnd*sqrt(1 - ζd^2)
s2 == -ζd*ωnd - j*ωnd*sqrt(1 - ζd^2)
s1 := -ζd*ωnd = -66.6667
s2 := -ζd*ωnd = -66.6667
s3 := p3d
z1 := e^(s1*Ts) = 0.986755
z2 := e^(s2*Ts) = 0.986755
z3 := e^(s3*Ts) = 0.923116
K1_barra_d := 3 - z2 - z3 - Ts/(Cdc*Rdc) - z1 = 0.0990882
K2_barra_d := z1*z2 + z1*z3 + z2*z3 - Ts^2/(Cdc*L) + 2*Ts/(Cdc*Rdc) - Kdpwm^2*Ts^2*UC^2/(Cdc*L) + 2*Kdpwm*Ts^2*UC/(Cdc*L) - 3 = -0.196314
K3_barra_d := (Rdc*Kdpwm^2*Ts^2*UC^2 - 2*Rdc*Kdpwm*Ts^2*UC + Rdc*Ts^2 - L*Ts + Cdc*L*Rdc - Cdc*L*Rdc*z1*z2*z3)/(Cdc*L*Rdc) = 0.0972391
Km_barra_d := [K1_barra_d, K2_barra_d, K3_barra_d]
Cod == [Bamd, Aamd*Bamd, Aamd^2*Bamd]
Bamd := [Kdpwm*Ts*X2/L; -Kdpwm*Ts*X1/Cdc; 0] = [3.0518e-5; -0.000102039; 0]
Aamd := [1, -Ts*(1 - Kdpwm*UC)/L, 0; Ts*(1 - Kdpwm*UC)/Cdc, 1 - Ts/(Cdc*Rdc), 0; -Ts, 0, 1] = [1, -0.00128161, 0; 0.272682, 0.995715, 0; -0.0002, 0, 1]
Aamd*Bamd = [3.06488e-5; -9.32796e-5; -6.1036e-9]
Aamd^2*Bamd = [3.07683e-5; -8.45225e-5; -1.22334e-8]
Cod := [
    Bamd[0, 0], (Aamd*Bamd)[0, 0], (Aamd^2*Bamd)[0, 0];
    Bamd[1, 0], (Aamd*Bamd)[1, 0], (Aamd^2*Bamd)[1, 0];
    Bamd[2, 0], (Aamd*Bamd)[2, 0], (Aamd^2*Bamd)[2, 0]
] = [
    3.0518e-5, 3.06488e-5, 3.07683e-5;
    -0.000102039, -9.32796e-5, -8.45225e-5;
    0, -6.1036e-9, -1.22334e-8
]
Cid == toeplitz(a2d, a1d, a0d)
z^3 - a2d*z^2 + a1d*z - a0d == 0
a2d := (3*Cdc*L*Rdc - L*Ts)/(Cdc*L*Rdc) = 2.99571
a1d := (Rdc*Kdpwm^2*Ts^2*UC^2 - 2*Rdc*Kdpwm*Ts^2*UC + Rdc*Ts^2 - 2*L*Ts + 3*Cdc*L*Rdc)/(Cdc*L*Rdc) = 2.99178
a0d := (Rdc*Kdpwm^2*Ts^2*UC^2 - 2*Rdc*Kdpwm*Ts^2*UC + Rdc*Ts^2 - L*Ts + Cdc*L*Rdc)/(Cdc*L*Rdc) = 0.996064
Cid := [1, -a2d, a1d; 0, 1, -a2d; 0, 0, 1] = [1, -2.99571, 2.99178; 0, 1, -2.99571; 0, 0, 1]
Qd := (Cod*Cid)^-1
Qd = [
    -41666766, -12471623, -1.91171e10;
    -42059997, -12579431, -1.91171e10;
    -42423577, -12688172, -1.91171e10
]
Kmd := Km_barra_d*Qd
Kmd = [3043.14, -60.9358, -257839]
# En la implementación del controlador multiplicar la tercer ganancia que es Kid por Ts
k1md := Kmd[0, 0] = 3043.14
k2md := Kmd[0, 1] = -60.9358
kimd := -(Kmd[0, 2]*Ts) = 51.5679  # Se invierte el signo para evitar la acción contraria de la integración
# Autovalores deben ser igual a los polos deseados
eigenvals([1, -Ts*(1 - Kdpwm*UC)/L, 0; Ts*(1 - Kdpwm*UC)/Cdc, 1 - Ts/(Cdc*Rdc), 0; -Ts, 0, 1] - [Kdpwm*Ts*X2/L; -Kdpwm*Ts*X1/Cdc; 0]*Kmd) = [0.923116; 0.986755 + 9.29776e-8i; 0.986755 - 9.29776e-8i]
# Nota: el poder de calculo de matchad tiene que estar a su maxima capacidad, de lo contrario el ultimo valor de Km no es correcto
# Estos resultados se resuelven en el arhivo "M_Dis_Cont_Conv_Boost_V1" usando el comando acker
